// SBML level 3 version 1

model YML_File_Model_with_observables()

  // Compartments:
  compartment Compartment = 1;

  // Species:
  species F in Compartment = 1000000/Compartment;  // substance in dimensionless
  species C in Compartment = 0;  // substance in dimensionless
  species N in Compartment = 0;  // substance in dimensionless
  species D in Compartment = 0;  // substance in dimensionless

  // Parameters:
  alpha = 0.0017 dimensionless;
  beta = 0.28 dimensionless;
  k_NF = 1.2e-6 dimensionless;
  d_MF = 3.2e-7 dimensionless;
  k_C = 3.8e-13 dimensionless;
  k_CD = 3.1e-7 dimensionless;
  delta_C = 0.066 dimensionless;
  delta_N = 0.061 dimensionless;
  alpha_D_Dv = 17000 dimensionless;
  k_ND = 6.9e-9 dimensionless;
  delta_D = 0.1 dimensionless;
  Nv = 150000000 dimensionless;
  M = 300000 dimensionless;
  extra = 1000000 dimensionless;

  // Rate rules:
  F' = beta*F - k_NF*N*F - d_MF*M*F;
  C' = (k_C*M*F + k_CD*D - delta_C*C)*extra;
  N' = alpha*Nv*C - k_NF*N*F - delta_N*N;
  D' = alpha_D_Dv*C - k_ND*N*D - delta_D*D;
end
