// SBML level 3 version 1

model Lotka_Volterra_with_observables()

  // Compartments:
  compartment Compartment = 1;

  // Species:
  species F in Compartment = 1000000/Compartment;  // substance in dimensionless
  species C in Compartment = 0;  // substance in dimensionless
  species NN in Compartment = 0;  // substance in dimensionless
  species Fd in Compartment = 0;  // substance in dimensionless

  // Parameters:
  alpha = 0.0017 dimensionless;
  beta = 0.28 dimensionless;
  k_NF = 1.2e-6 dimensionless;
  d_MF = 3.2e-7 dimensionless;
  k_C = 3.8e-13 dimensionless;
  k_NC = 3.1e-7 dimensionless;
  delta_C = 0.066 dimensionless;
  delta_N = 0.061 dimensionless;
  delta_Fd = 0.1 dimensionless;
  Nv = 150000000 dimensionless;
  M = 300000 dimensionless;

  // Rate rules:
  F' = beta*F - k_NF*NN*F - d_MF*M*F;
  C' = k_C*M*F + k_NC*NN - delta_C*C;
  NN' = alpha*Nv*C - k_NF*NN*F - delta_N*NN;
  Fd' = k_NF*NN*F + d_MF*M*F - delta_Fd*Fd;
end
